// SBML level 2 version 4
// dcterms:bibliographicCitation: http://identifiers.org/pubmed/24199619

model Model_1()
  // Model A - A systems biology approach to suppress TNF-induced proinflammatory gene expressions_1
  // isPartOf kegg.pathway:nt06516
  // isVersionOf efo:0004040
  // isVersionOf omit:0016968
  // isDescribedBy pubmed:24199619

  // Compartments:
  compartment compartment_1 = 1;

  // Species:
  species IkBa in compartment_1 = 0;  // uniprot:Q9Z1E3
  species NFkBc in compartment_1 = 0;  // hasInstance mim:164011; hasInstance mim:164012; isVersionOf uniprot:Q00653; isVersionOf uniprot:P19838
  species TNFR1 in compartment_1 = 1;  // isVersionOf mim:191190
  species TRADD in compartment_1 = 0;  // isVersionOf omit:0036899
  species cIAP in compartment_1 = 0;  // isVersionOf omit:0024646
  species TRAF6 in compartment_1 = 0;  // isVersionOf omit:0035862
  species TRAF5 in compartment_1 = 0;  // isVersionOf omit:0035861
  species RIP1 in compartment_1 = 0;  // isVersionOf mim:603453
  species TRAF2 in compartment_1 = 0;  // isVersionOf omit:0035859
  species TAK1complex in compartment_1 = 0;  // isVersionOf mim:602615; isVersionOf mim:605101; isVersionOf mim:602614
  species LUBAC in compartment_1 = 0;  // isVersionOf mim:612487; isVersionOf uniprot:Q9WUB0; isVersionOf mim:611885
  species SHARPIN in compartment_1 = 0;  // isVersionOf mim:611885
  species MKK12 in compartment_1 = 0;  // isVersionOf mim:176872; isVersionOf mim:601263
  species MKK47 in compartment_1 = 0;  // isVersionOf mim:603014; isVersionOf mim:601335
  species MKK36 in compartment_1 = 0;  // isVersionOf mim:601254; isVersionOf mim:602315
  species ERKc in compartment_1 = 0;  // isVersionOf omit:0023999
  species JNKc in compartment_1 = 0;  // isVersionOf omit:0023999
  species p38c in compartment_1 = 0;  // isVersionOf mim:602899
  species IKK in compartment_1 = 0;  // GO:0008385
  species NFkBn in compartment_1 = 0;  // hasInstance mim:164012; hasInstance mim:164011; isVersionOf uniprot:P19838; isVersionOf uniprot:Q00653
  species p38n in compartment_1 = 0;  // isVersionOf mim:602899
  species JNKn in compartment_1 = 0;  // isVersionOf omit:0023999
  species ERKn in compartment_1 = 0;  // isVersionOf omit:0023999
  species AP1 in compartment_1 = 0;  // isVersionOf interpro:IPR000837
  species G1promoter in compartment_1 = 0;  // isVersionOf SBO:0000590
  species G2promoter in compartment_1 = 0;  // isVersionOf SBO:0000590
  species G3promoter in compartment_1 = 0;  // isVersionOf SBO:0000590
  species G1pre1 in compartment_1 = 0;  // isVersionOf SBO:0000250
  species G1mRNA in compartment_1 = 0;  // isVersionOf SBO:0000250
  species G2pre1 in compartment_1 = 0;  // isVersionOf SBO:0000250
  species G2pre2 in compartment_1 = 0;  // isVersionOf SBO:0000250
  species G2mRNA in compartment_1 = 0;  // isVersionOf SBO:0000250
  species G3pre1 in compartment_1 = 0;  // isVersionOf SBO:0000250
  species G3pre2 in compartment_1 = 0;  // isVersionOf SBO:0000250
  species G3pre3 in compartment_1 = 0;  // isVersionOf SBO:0000250
  species G3mRNA in compartment_1 = 0;  // isVersionOf SBO:0000250
  species X1 in compartment_1 = 0;  // hasProperty CHEBI:64297
  species X2 in compartment_1 = 0;  // hasProperty CHEBI:64297
  species X3 in compartment_1 = 0;  // hasProperty CHEBI:64297
  species X4 in compartment_1 = 0;  // hasProperty CHEBI:64297
  species X5 in compartment_1 = 0;  // hasProperty CHEBI:64297
  species X6 in compartment_1 = 0;  // hasProperty CHEBI:64297
  species X7 in compartment_1 = 0;  // hasProperty CHEBI:64297
  species X8 in compartment_1 = 0;  // hasProperty CHEBI:64297
  species X9 in compartment_1 = 0;  // hasProperty CHEBI:64297
  species X10 in compartment_1 = 0;  // hasProperty CHEBI:64297
  species X11 in compartment_1 = 0;  // hasProperty CHEBI:64297
  species X12 in compartment_1 = 0;  // hasProperty CHEBI:64297
  species X13 in compartment_1 = 0;  // hasProperty CHEBI:64297
  species X14 in compartment_1 = 0;  // hasProperty CHEBI:64297
  species Y in compartment_1 = 0;  // hasProperty bao:0000282

  // Parameters:
  FB = 0.002;
  KO = 0;

  // Reactions:
  TNFR1_TRADD: TNFR1 => TRADD; compartment_1*TNFR1_TRADD_k1*TNFR1; TNFR1_TRADD is "TNFR1 -> TRADD";
    TNFR1_TRADD_k1 = 0.005;
  TRADD_cIAP1_2: TRADD => cIAP; compartment_1*TRADD_cIAP1_2_k1*TRADD; TRADD_cIAP1_2 is "TRADD -> cIAP1/2";
    TRADD_cIAP1_2_k1 = 0.02;
  TRADD_TRAF6: TRADD => TRAF6; compartment_1*TRADD_TRAF6_k1*TRADD; TRADD_TRAF6 is "TRADD -> TRAF6";
    TRADD_TRAF6_k1 = 0.02;
  cIAP1_2_TRAF5: cIAP => TRAF5; compartment_1*cIAP1_2_TRAF5_k1*cIAP; cIAP1_2_TRAF5 is "cIAP1/2 -> TRAF5";
    cIAP1_2_TRAF5_k1 = 0.008;
  TRAF2_RIP1: TRAF2 => RIP1; compartment_1*TRAF2_RIP1_k1*TRAF2; TRAF2_RIP1 is "TRAF2 -> RIP1";
    TRAF2_RIP1_k1 = 0.001;
  TRAF5_RIP1: TRAF5 => RIP1; compartment_1*TRAF5_RIP1_k1*TRAF5; TRAF5_RIP1 is "TRAF5 -> RIP1";
    TRAF5_RIP1_k1 = 0.001;
  TRAF6_RIP1: TRAF6 => RIP1; compartment_1*TRAF6_RIP1_k1*TRAF6; TRAF6_RIP1 is "TRAF6 -> RIP1";
    TRAF6_RIP1_k1 = 0.0001;
  TRAF6_TAK1_complex: TRAF6 => TAK1complex; compartment_1*TRAF6_TAK1_complex_k1*TRAF6; TRAF6_TAK1_complex is "TRAF6 -> TAK1 complex";
    TRAF6_TAK1_complex_k1 = 0.00013;
  RIP1_LUBAC: RIP1 => LUBAC; compartment_1*RIP1_LUBAC_k1*RIP1; RIP1_LUBAC is "RIP1 -> LUBAC";
    RIP1_LUBAC_k1 = 0.007;
  LUBAC_TAK1_complex: LUBAC => TAK1complex; compartment_1*LUBAC_TAK1_complex_k1*LUBAC; LUBAC_TAK1_complex is "LUBAC -> TAK1 complex";
    LUBAC_TAK1_complex_k1 = 0.1;
  RIP1_SHARPIN: RIP1 => SHARPIN; compartment_1*RIP1_SHARPIN_k1*RIP1; RIP1_SHARPIN is "RIP1 -> SHARPIN";
    RIP1_SHARPIN_k1 = 0.007;
  SHARPIN_IKK: SHARPIN => IKK; compartment_1*SHARPIN_IKK_k1*SHARPIN; SHARPIN_IKK is "SHARPIN -> IKK";
    SHARPIN_IKK_k1 = 0.01;
  TAK1_complex_IKK: TAK1complex => IKK; compartment_1*TAK1_complex_IKK_k1*TAK1complex; TAK1_complex_IKK is "TAK1 complex -> IKK";
    TAK1_complex_IKK_k1 = 0.1;
  TAK1_complex_MKK12: TAK1complex => MKK12; compartment_1*TAK1_complex_MKK12_k1*TAK1complex; TAK1_complex_MKK12 is "TAK1 complex -> MKK12";
    TAK1_complex_MKK12_k1 = 0.0015;
  TAK1_complex_MKK47: TAK1complex => MKK47; compartment_1*TAK1_complex_MKK47_k1*TAK1complex; TAK1_complex_MKK47 is "TAK1 complex -> MKK47";
    TAK1_complex_MKK47_k1 = 0.01;
  TAK1_complex_MKK36: TAK1complex => MKK36; compartment_1*TAK1_complex_MKK36_k1*TAK1complex; TAK1_complex_MKK36 is "TAK1 complex -> MKK36";
    TAK1_complex_MKK36_k1 = 0.01;
  MKK12_ERKc: MKK12 => ERKc; compartment_1*MKK12_ERKc_k1*MKK12; MKK12_ERKc is "MKK12 -> ERKc";
    MKK12_ERKc_k1 = 0.005;
  MKK47_JNK: MKK47 => JNKc; compartment_1*MKK47_JNK_k1*MKK47; MKK47_JNK is "MKK47 -> JNK";
    MKK47_JNK_k1 = 0.005;
  MKK36_p38: MKK36 => p38c; compartment_1*MKK36_p38_k1*MKK36; MKK36_p38 is "MKK36 -> p38";
    MKK36_p38_k1 = 0.005;
  IKK_IKBa: IKK => IkBa; compartment_1*IKK_IKBa_k1*IKK; IKK_IKBa is "IKK -> IKBa";
    IKK_IKBa_k1 = 0.01;
  NFKBc_NFKBn: NFkBc => NFkBn; compartment_1*NFKBc_NFKBn_k1*NFkBc; NFKBc_NFKBn is "NFKBc -> NFKBn";
    NFKBc_NFKBn_k1 = 0.017;
  p38_p38n: p38c => p38n; compartment_1*p38_p38n_k1*p38c; p38_p38n is "p38 -> p38n";
    p38_p38n_k1 = 0.05;
  JNK_JNKn: JNKc => JNKn; compartment_1*JNK_JNKn_k1*JNKc; JNK_JNKn is "JNK -> JNKn";
    JNK_JNKn_k1 = 0.05;
  ERK_ERKn: ERKc => ERKn; compartment_1*ERK_ERKn_k1*ERKc; ERK_ERKn is "ERK -> ERKn";
    ERK_ERKn_k1 = 0.005;
  ERKn_AP1: ERKn => AP1; compartment_1*ERKn_AP1_k1*ERKn; ERKn_AP1 is "ERKn -> AP1";
    ERKn_AP1_k1 = 0.01;
  JNKn_AP1: JNKn => AP1; compartment_1*JNKn_AP1_k1*JNKn; JNKn_AP1 is "JNKn -> AP1";
    JNKn_AP1_k1 = 0.01;
  p38n_AP1: p38n => AP1; compartment_1*p38n_AP1_k1*p38n; p38n_AP1 is "p38n -> AP1";
    p38n_AP1_k1 = 0.01;
  AP1_G1_promoter: AP1 => G1promoter; compartment_1*AP1_G1_promoter_k1*AP1; AP1_G1_promoter is "AP1 -> G1 promoter";
    AP1_G1_promoter_k1 = 0.1;
  AP1_G2_promoter: AP1 => G2promoter; compartment_1*AP1_G2_promoter_k1*AP1; AP1_G2_promoter is "AP1 -> G2 promoter";
    AP1_G2_promoter_k1 = 0.011;
  AP1_G3_promoter: AP1 => G3promoter; compartment_1*AP1_G3_promoter_k1*AP1; AP1_G3_promoter is "AP1 -> G3 promoter";
    AP1_G3_promoter_k1 = 0.005;
  G1_promoter_G1_preRNA1: G1promoter => G1pre1; compartment_1*G1_promoter_G1_preRNA1_k1*G1promoter; G1_promoter_G1_preRNA1 is "G1 promoter -> G1 preRNA1";
    G1_promoter_G1_preRNA1_k1 = 0.01;
  G1_preRNA1_G1_mRNA: G1pre1 => G1mRNA; compartment_1*G1_preRNA1_G1_mRNA_k1*G1pre1; G1_preRNA1_G1_mRNA is "G1 preRNA1 -> G1 mRNA";
    G1_preRNA1_G1_mRNA_k1 = 0.05;
  G1_X1: G1mRNA => X1; compartment_1*G1_X1_k1*G1mRNA; G1_X1 is "G1 -> X1";
    G1_X1_k1 = 1e-5;
  G2_promoter_G2_preRNA1: G2promoter => G2pre1; compartment_1*G2_promoter_G2_preRNA1_k1*G2promoter; G2_promoter_G2_preRNA1 is "G2 promoter -> G2 preRNA1";
    G2_promoter_G2_preRNA1_k1 = 0.002;
  G2_preRNA1_G2_preRNA2: G2pre1 => G2pre2; compartment_1*G2_preRNA1_G2_preRNA2_k1*G2pre1; G2_preRNA1_G2_preRNA2 is "G2 preRNA1 -> G2 preRNA2";
    G2_preRNA1_G2_preRNA2_k1 = 0.05;
  G2_preRNA2_G2_mRNA: G2pre2 => G2mRNA; compartment_1*G2_preRNA2_G2_mRNA_k1*G2pre2; G2_preRNA2_G2_mRNA is "G2 preRNA2 -> G2 mRNA";
    G2_preRNA2_G2_mRNA_k1 = 0.05;
  G2_decay: G2mRNA => ; compartment_1*G2_decay_k1*G2mRNA;
    G2_decay_k1 = 0.00012;
  G3_promoter_G3_preRNA1: G3promoter => G3pre1; compartment_1*G3_promoter_G3_preRNA1_k1*G3promoter; G3_promoter_G3_preRNA1 is "G3 promoter -> G3 preRNA1";
    G3_promoter_G3_preRNA1_k1 = 0.1;
  G3_preRNA1_G3_preRNA2: G3pre1 => G3pre2; compartment_1*G3_preRNA1_G3_preRNA2_k1*G3pre1; G3_preRNA1_G3_preRNA2 is "G3 preRNA1 -> G3 preRNA2";
    G3_preRNA1_G3_preRNA2_k1 = 0.0004;
  G3_preRNA2_G3_preRNA3: G3pre2 => G3pre3; compartment_1*G3_preRNA2_G3_preRNA3_k1*G3pre2; G3_preRNA2_G3_preRNA3 is "G3 preRNA2 -> G3 preRNA3";
    G3_preRNA2_G3_preRNA3_k1 = 0.001;
  G3_preRNA3_G3_mRNA: G3pre3 => G3mRNA; compartment_1*G3_preRNA3_G3_mRNA_k1*G3pre3; G3_preRNA3_G3_mRNA is "G3 preRNA3 -> G3 mRNA";
    G3_preRNA3_G3_mRNA_k1 = 0.0002;
  G3_decay: G3mRNA => ; compartment_1*G3_decay_k1*G3mRNA;
    G3_decay_k1 = 2e-5;
  NFKBn_X1: NFkBn => X1; compartment_1*NFKBn_X1_k1*NFkBn; NFKBn_X1 is "NFKBn -> X1";
    NFKBn_X1_k1 = 0.5;
  X1_X2: X1 => X2; compartment_1*X1_X2_k1*X1; X1_X2 is "X1 -> X2";
    X1_X2_k1 = 0.002;
  X2_X3: X2 => X3; compartment_1*X2_X3_k1*X2; X2_X3 is "X2 -> X3";
    X2_X3_k1 = 0.002;
  X3_X4: X3 => X4; compartment_1*X3_X4_k1*X3; X3_X4 is "X3 -> X4";
    X3_X4_k1 = 0.002;
  X14_IKBa: X14 => IkBa; compartment_1*X14_IKBa_k1*X14; X14_IKBa is "X14 -> IKBa";
    X14_IKBa_k1 = 0.002;
  cIAP1_2_TRAF2: cIAP => TRAF2; compartment_1*cIAP1_2_TRAF2_k1*cIAP; cIAP1_2_TRAF2 is "cIAP1/2 -> TRAF2";
    cIAP1_2_TRAF2_k1 = 0.01;
  IKBa_NFKBc: IkBa => NFkBc; compartment_1*IKBa_NFKBc_k1*IkBa; IKBa_NFKBc is "IKBa -> NFKBc";
    IKBa_NFKBc_k1 = 0.008;
  X4_X5: X4 => X5; compartment_1*X4_X5_k1*X4; X4_X5 is "X4 -> X5";
    X4_X5_k1 = 0.002;
  X5_X6: X5 => X6; compartment_1*X5_X6_k1*X5; X5_X6 is "X5 -> X6";
    X5_X6_k1 = 0.002;
  X6_X7: X6 => X7; compartment_1*X6_X7_k1*X6; X6_X7 is "X6 -> X7";
    X6_X7_k1 = 0.002;
  X7_X8: X7 => X8; compartment_1*X7_X8_k1*X7; X7_X8 is "X7 -> X8";
    X7_X8_k1 = 0.002;
  NFKBn_G3_promoter: NFkBn => G3promoter; compartment_1*NFKBn_G3_promoter_k1*NFkBn; NFKBn_G3_promoter is "NFKBn -> G3 promoter";
    NFKBn_G3_promoter_k1 = 0.0001;
  NFKBn_G2_promoter: NFkBn => G2promoter; compartment_1*NFKBn_G2_promoter_k1*NFkBn; NFKBn_G2_promoter is "NFKBn -> G2 promoter";
    NFKBn_G2_promoter_k1 = 0.004;
  X8_X9: X8 => X9; compartment_1*X8_X9_k1*X8; X8_X9 is "X8 -> X9";
    X8_X9_k1 = 0.002;
  X9_X10: X9 => X10; compartment_1*X9_X10_k1*X9; X9_X10 is "X9 -> X10";
    X9_X10_k1 = 0.002;
  NFKBn_G1_promoter: NFkBn => G1promoter; compartment_1*NFKBn_G1_promoter_k1*NFkBn; NFKBn_G1_promoter is "NFKBn -> G1 promoter";
    NFKBn_G1_promoter_k1 = 0.005;
  G1_decay: G1mRNA => ; compartment_1*G1_decay_k1*G1mRNA;
    G1_decay_k1 = 0.002;
  X10_11: X10 => X11; compartment_1*X10_11_k1*X10; X10_11 is "X10 -> 11";
    X10_11_k1 = 0.002;
  X11_X12: X11 => X12; compartment_1*X11_X12_k1*X11; X11_X12 is "X11 -> X12";
    X11_X12_k1 = 0.002;
  X12_X13: X12 => X13; compartment_1*X12_X13_k1*X12; X12_X13 is "X12 -> X13";
    X12_X13_k1 = 0.002;
  X13_X14: X13 => X14; compartment_1*X13_X14_k1*X13; X13_X14 is "X13 -> X14";
    X13_X14_k1 = 0.002;
  X14_Y: X14 => Y; compartment_1*X14_Y_k1*X14; X14_Y is "X14 -> Y";
    X14_Y_k1 = 1e-5;
  Y_G3_promoter: Y => G3promoter; compartment_1*Y_G3_promoter_k1*Y; Y_G3_promoter is "Y -> G3 promoter";
    Y_G3_promoter_k1 = 0.002;

  // Unit definitions:
  unit length = metre;
  unit area = metre^2;
  unit volume = 1e-3 litre;
  unit time = second;
  unit substance = 1e-3 mole;
end
